# When using LAMMPS-GUI in your project, please cite: https://arxiv.org/abs/2503.14020
# 1) Initialization

# https://docs.lammps.org/dimension.html
units nano
# How do I convert these?
# 1 m = 1E9 nm
# 1 s = 1E9 ns
# 1 kg = 1E18 attograms
# 1 N = kg*m/(s2) = E18 * 1E9 / (E18) = 1E9 attogram-nanometer/nanosecond^2
# 1 J = N*m = 1E18 attogram-nm2/ns2
# 1 N/m = 1 attogram/nanosecond^2
dimension 2
atom_style angle
boundary p p p

# 2) Static Complex
# https://docs.lammps.org/read_data.html
# https://docs.lammps.org/Run_formats.html#data-file
#read_data testsystem.data
read_data file.data

# 3) Settings
# Set pair_style, required for bonds
pair_style zero 5 # zero = no interactions, distance to consider neighbors
pair_coeff * *    # This non-existant pairs should exist between all types

### Define behavior of the bonds in the datafile

# Stretching Component
bond_style hybrid harmonic nonlinear
#bond_style hybrid harmonic lepton

#Bond Parameters with gylcan are from Nguyen 2015, Peptide Model is Curve Fit

bond_coeff 1 harmonic 5.570 2.00
bond_coeff 2 nonlinear 0.1709 0.9065 4.0878

# Bending Component :: https://docs.lammps.org/angle_harmonic.html
angle_style harmonic
angle_coeff 1 4.18E-2 180.0 # btype, K (E/rad^2), theta0 (deg). Note: K is placeholder from slides

# 4) Monitoring
thermo_style custom step etotal pe temp # Tell it to print step and total energy
thermo 1 # every iteration

# https://docs.lammps.org/dump_image.html

#dump_modify bond color type

# 5) Start with minimized energy
dump 1 all image 500 dump.*.jpg type type bond type type atom no
minimize 1.0e-6 1.0e-6 2000 10000

# State Before Deformation

# Output Undeformed State
compute 1 all property/local btype batom1 batom2
compute 2 all bond/local dist fx fy fz
run 0
write_dump all local bond_state_0.dump index c_1[1] c_1[2] c_1[3] c_2[1] c_2[2] c_2[3] c_2[4]
write_dump all custom atom_state_0.dump id mol type x y
uncompute 1
uncompute 2

# 6) Prescribe strain, let positions and velocities update
fix 1 all nve                                        # Forces from bonds will result in motion
fix 2 all deform 1 x scale 1.05 units box remap none # Box deforms, do we want to remap velocity? remap v
#fix 2 all deform 10 xy delta 5 units box remap none # Box deforms, do we want to remap velocity? remap v
# Potential Energy decrease solved -> need more run steps + lower mass

# TODO: dump step pe box dimensions

run 20000

#fix 2 all none
minimize 1.0e-6 1.0e-6 2000 10000

# https://docs.lammps.org/compute_bond_local.html
# 7) Output for Python
compute 1 all property/local btype batom1 batom2
compute 2 all bond/local dist fx fy fz
run 0 # Computation happens at this step
write_dump all local bond_state.dump index c_1[1] c_1[2] c_1[3] c_2[1] c_2[2] c_2[3] c_2[4]
write_dump all custom atom_state.dump id mol type x y

# Next Action-Items:

# Compute actual cross-linking proportions, draw plot (Figure 2.5).

# Force chains -> matplotlib

# Automate the entire process, build, run, process, output file. We will want to do ensamble averages.

# We want to sweep deformations from 0-50%, 20 points on the curve.
# Start measuring time to run simulations.

# Check thesis paper for:
# Differiate energy with respect to deformation  W = f(ex,ey,exy), take partials to get
# Moduli is second derivative of E with respect to the deformation gradient
# Research finite deformation, look in triangular network paper

# Use the two methods to verify each other

# Look into way to measure effective thickness of the network. Literaure, people say the thickness is 1-3 layers.

# Distribution of cross-linking, stiffness values

# 1. Look at examples of how people have computed stress in the past for material studies
# 2. Export data to dump file, read in Python to perform post-processing there
# -> Stress across a plane
# -> Distribution of stresses and strains, force chains (Octavio has code to help)
# -> Pore count and size (paper during group meeting suggested 20nm radius at 1 atm turgor causes blebing)
# 3. Lammps can also output PE which can be compared to stress * strain to ensure we are calculating it correcty.

# Notes: Critical
# Long-term, might want to look at deformation vs. bond-breaking
